/PREP7
ET,1,BEAM188
K,1,0,0,0
K,2,0.5,0,0
K,3,1,0,0
L,1,2
L,2,3
MP,EX,1,2e+11
MP,NUXY,1,0.3
MP,DENS,1,7850
SECTYPE,1,BEAM,I,_b1,0
SECDATA,0.05,0.05,0.05,0.01,0.01,0.01,
LMESH,1,,
LMESH,2,,
/PNUM,NODE,1
/SOLU
D,1,ALL,,
F,5,FY,-1000
